# Worksheet setting: ORIGIN = 1
# Lorenz Attraktor:
xderi(tac, xac) :=
    si ← 10
    b ← 7/3
    r ← 28
    xderi[1] ← -si*xac[1] + si*xac[2]
    xderi[2] ← -xac[2] + r*xac[1] - xac[1]*xac[3]
    xderi[3] ← -b*xac[3] + xac[1]*xac[2]
    xderi  # ...Ableitungsfunktion
xderi(1, [1; 1; 1]) = [0; 26; -1.33333]
# [component: outputs xx]
xini := [5; 5.02; 0.000001]
p := 10
r := 25
b := 8/3
T1 := 15
n := 50
Given
x := [0; 1; 2; 3; 4; 6; 7; 8.5; 9; 10; 11; 12; 13; 14; 15]
x :=
    for i ∈ 1 .. n
        x1[i] ← i/20
    x1  # disabled
d/dtonne(x(tonne)) == p*(y(tonne) - x(tonne))
x(0) == 0
i := 1, 2 .. 2
d/dtonne(y(tonne)) == r*x(tonne) - y(tonne) - x(tonne)*z(tonne)
y(0) == 1
d/dtonne(z(tonne)) == x(tonne)*y(tonne) - b*z(tonne)
z(0) == 20
P1 := 9.7
P2 := 9.8
P3 := 2.67
P4 := 2.8
P5 := 14.2
P6 := 14.25
P7 := 3.07
P8 := 3.17
[x2; y2; z2] := Odesolve([x; y; z], tonne, T1, 1*10^3)
t1 := 0, T1/(1*10^3) .. T1
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h1(z1) =  # no stored result; disabled
X2 := [5; 10.352; -2.676; 8.587; -5.129; -3.778; -3.815; 0.231; -3.651; -6.347; -11.225]
X3 := [20.01; 16.467; 10.624; 15.533; 13.088; 15.067; 20.294; 16.474; 27.462; 19.029; 16.143]
X1 := [5; 6.446; -1.476; 5.309; -2.98; -2.262; -2.096; -0.084; -6.06; -4.7; -6.856]
X =  # no stored result; disabled
FF :=
    for i ∈ 1 .. 20
        F1[i, 1] ← X[i]
        F1[i, 2] ← Y[i]
        F1[i, 3] ← Z[i]
    F1  # error: Diese Variable ist nicht definiert.
# [component: inputs FF]
T1 := 1
Given
# annotation to a formula above: Lösen eines Systems von Differentialgleichungen erster Ordnung mithilfe diverser eingebauter Funktionen.
d/du(y0(u)) == -8*y0(u) + 8*y1(u)
y0(0) == -1
d/du(y1(u)) == 30*y0(u) + y1(u) - y0(u)*y2(u)
y1(0) == 0
y2(0) == 1
d/du(y2(u)) == y0(u)*y1(u) - 8/3*y2(u)
[f; g; h1] := Odesolve([y0; y1; y2], u, T1, 1*10^3)
z1 := 0, T1/(1*10^3) .. T1
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